# https://blog.federnshop.com/schenkelfedern-torsionsfedern/
# https://webshop.alcomex.de/schenkelfeder-edelstahl-o-3-00x26-00x15-75-mm-tor2130r
# https://www.hennlich.at/uploads/e_SchenkelfedernDrehfedern2016_Gesamtkapitel.pdf
# https://www.knoerzer.eu/fileadmin/user_upload/user_upload/FK_Kat-Web_20191120_Lay_01.pdf
# Schenkelfeder: (180° Ausgangswinkel)
# Fn.....höchste erreichbare Federkraft
# Mn.....maximales Drehmoment
# RH.....Hebelarm
# Fx.....erreichbare kraft bei
# αx.....vorgegebenen Drehwinkel
# αn.....maximaler Drehwinkel
# c.....Federkonstante Moment pro Grad Drehwinkel
# σ.....Biegespannung
# Allgemeine Formeln
# Fn=Mn/RH
# Fx=Fn/αn*αx
# Angabe:
Mn1 := 2.914 J
αn := 90°
d := 3 mm
RH := 0.055 m
αx := 45°
Mn2 := 2914 J
# Berechnung:
Fn := Mn1/RH = 52.9818 N
Fx := Fn/αn*αx = 26.4909 N
σ := 32/π*Mn2/d^3 = 1099324 N/mm^2
# 1. Anmerkung:
# Vorhin berechnet maximale kraft von Wind senkrecht auf solar ist 7,676kg -> 76,76N bedeutet, wenn der Wind auf die Fläche trifft bleibt das Solarpaneel nicht offen. Maximale Federkraft ist nämlich nur 52,982N. (ohne Berücksichtigung von den Gegengewichten)
# 2. Anmerkung:
# Bei einem Hebelarm (RH) von 0,037m würde eine maximale Federkraft von 78,757 N auftreten, bedeutet, dass das Solarpaneel offen bleiben würde. (ohne Berücksichtigung von dem Gegengewicht)
