# Standgewicht Windgenerator auf Schiffspiegel:
# Angabe:
m_gesW := 49.99 kg
A_auflageW := 9719.42 mm^2
F_W := m_gesW/A_auflageW = 0.00514331 kg/mm^2  # 0.005143 kg/mm²
# Standgewicht Solar auf Reling:
# Angabe:
m_gesS := 13.907 kg
A_auflageS := 9840.8 mm^2
F_S := m_gesS/A_auflageS = 0.0014132 kg/mm^2
# Standgewicht Windgenerator auf Schiffspiegel:
# Angabe:
m_W := 22.65 kg
A_W := 5007.04 mm^2
F := 222.1965 N
l := 60 mm
# Berechnung:
M := F*l = 13.3318 J
# Standgewicht Solar auf Reling:
# Angabe:
