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l_1 := 590 mm
l_2 := 250 mm
l_3 := 180 mm
F_g := 105 N
F_D := 200*2 N
α := 10°
# Fg ... Gewichtskraft
# FD ... Dämpferkraft
# FH ... Haltekraft
# FA ... Auflagekraft
F_Dy := sin(α)*F_D = 69.4593 N
F_Dx := cos(α)*F_D = 393.923 N
ΣF_x == -F_Dx + F_Ax
ΣF_y == -F_H - F_G + F_Dy + F_Ay
ΣM_A == F_H*l_1 + F_g*l_2 - F_Dy*l_3
F_H := (F_g*l_2 - F_Dy*l_3)/l_1
F_H = 23.3006 N
F_Ay := F_H + F_g - F_Dy
F_Ay = 58.8413 N
F_Ax := F_Dx
F_Ax = 393.923 N
F_A := sqrt(F_Ay^2 + F_Ax^2)
F_A = 398.293 N
